# OpenSim document version 40500
Model Pose2Sim_scaled:
  gravity: 0 -9.80665 0
  length_units: meters
  force_units: N
  credits:
    Full-body model adapted from Beaucage-Gauvreau et al., with Rajagopal et al. knee angles. AlphaPose Halpe_26 markers. No muscles included. Free pelvis translation, added ball joint between head and torso, locked arm pronation/supination, clamped hip flexion to 150° instead of 120°, hip adduction -60° instead of -50°, hip rotation -70° instead of -40°, knee 155° instead of 120°.
  publications:
    Pagnon, D., Domalain, M., Reveret, L. (2021). Pose2Sim: An End-to-End Workflow for 3D Markerless Sports Kinematics—Part 1: Robustness. Sensors, 21(19), 6530.
  Ground
  BodySet:
    Body pelvis: mass=9.816714 [kg] mass_center=(-0.06529665 0 0) inertia=(0.07309162 0.06192879 0.04116736 0 0 0)
        meshes=(r_pelvis.vtp l_pelvis.vtp)
    Body sacrum: mass=0 mass_center=(0 0 0) inertia=(0 0 0 0 0 0) meshes=sacrum.vtp
    Body femur_r: mass=7.753179 mass_center=(0 -0.1898509 0) inertia=(0.1392001 0.03648934 0.146789 0 0 0)
        meshes=femur_r.vtp
    Body patella_r: mass=0.07185198 mass_center=(0.002010186 0.02948273 0)
        inertia=(2.983601e-6 1.362892e-5 1.362892e-5 0 0 0) meshes=r_patella.vtp
    Body tibia_r: mass=3.090385 mass_center=(0 -0.1854638 0) inertia=(0.04145642 0.004194995 0.0420322 0 0 0)
        meshes=(tibia_r.vtp fibula_r.vtp)
    Body talus_r: mass=0.08335497 mass_center=(0 0 0) inertia=(0.0007222634 0.0007222634 0.0007222634 0 0 0)
        meshes=talus_rv.vtp
    Body calcn_r: mass=1.041937 mass_center=(0.09308551 0.02792565 0)
        inertia=(0.001011169 0.002816827 0.00296128 0 0 0) meshes=foot.vtp
    Body toes_r: mass=0.1805469 mass_center=(0.03220759 0.00558513 -0.01628996)
        inertia=(7.222634e-5 0.0001444527 0.0007222634 0 0 0) meshes=bofoot.vtp
    Body femur_l: mass=7.753179 mass_center=(0 -0.1898509 0) inertia=(0.1392001 0.03648934 0.146789 0 0 0)
        meshes=femur_l.vtp
    Body patella_l: mass=0.07185198 mass_center=(0.002010186 0.02948273 0)
        inertia=(2.983601e-6 1.362892e-5 1.362892e-5 0 0 0) meshes=l_patella.vtp
    Body tibia_l: mass=3.090385 mass_center=(0 -0.1854638 0) inertia=(0.04145642 0.004194995 0.0420322 0 0 0)
        meshes=(tibia_l.vtp fibula_l.vtp)
    Body talus_l: mass=0.08335497 mass_center=(0 0 0) inertia=(0.0007222634 0.0007222634 0.0007222634 0 0 0)
        meshes=talus_lv.vtp
    Body calcn_l: mass=1.041937 mass_center=(0.09308551 0.02792565 0)
        inertia=(0.001011169 0.002816827 0.00296128 0 0 0) meshes=l_foot.vtp
    Body toes_l: mass=0.1805469 mass_center=(0.03220759 0.00558513 0.01628996)
        inertia=(7.222634e-5 0.0001444527 0.0007222634 0 0 0) meshes=l_bofoot.vtp
    Body lumbar5: mass=1.520395 mass_center=(0.01548578 0.01639988 0) inertia=(0.1193046 0.01454515 0.1147993 0 0 0)
        meshes=lumbar5.vtp
    Body lumbar4: mass=1.499556 mass_center=(0.01666873 0.01953225 0) inertia=(0.1146132 0.01384344 0.1105764 0 0 0)
        meshes=lumbar4.vtp
    Body lumbar3: mass=1.392028 mass_center=(0.01603594 0.02085733 0) inertia=(0.1055684 0.01332898 0.1020538 0 0 0)
        meshes=lumbar3.vtp
    Body lumbar2: mass=1.407865 mass_center=(0.02262484 0.01811371 0) inertia=(0.1089209 0.01471097 0.1055737 0 0 0)
        meshes=lumbar2.vtp
    Body lumbar1: mass=1.397863 mass_center=(0.02934054 0.0173922 0.001190927)
        inertia=(0.1088888 0.01615434 0.1057223 0 0 0) meshes=lumbar1.vtp
    Body torso: mass=18.77987 mass_center=(0.01454713 0.1615127 0) inertia=(0.9145838 0.4686118 0.8878503 0 0 0)
        meshes=(cerv1sm.vtp cerv2sm.vtp cerv3sm.vtp cerv4sm.vtp cerv5sm.vtp cerv6sm.vtp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)
      WrapCylinder Cylinder: translation=(-0.186403 0.03584672 0) quadrant=all radius=0.1523486 length=0.2330037
      WrapEllipsoid Chest_r: xyz_body_rotation=(0 -0.4 0.2) translation=(0 0.1881953 0.008961681) quadrant=z
          dimensions=(0.0672126 0.1523486 0.1165018)
      WrapEllipsoid Chest_l: xyz_body_rotation=(0 0.4 0.2) translation=(0 0.1881953 -0.008961681) quadrant=-z
          dimensions=(0.0672126 0.1523486 0.1165018)
    Body head: mass=3.565759 mass_center=(0.01986612 0.07234483 0) inertia=(0.01464392 0.01059618 0.01596844 0 0 0)
        meshes=(hat_jaw.vtp hat_skull.vtp)
    Body skin_head: mass=3.565759 mass_center=(0 0 0) inertia=(0.01464392 0.01059618 0.01596844 0 0 0) Position=(0 0 0)
        meshes=D:\GaitCode\pose2sim-main\Pose2Sim\Demo_SinglePerson\parts\main\head.stl
    Body Abdomen: mass=0.0008335497 mass_center=(0.008 0 0) inertia=(1.483718e-6 4.834588e-7 1.133628e-6 0 0 0)
      WrapEllipsoid Abdomen: translation=(0 0 0) quadrant=x dimensions=(0.01 0.08 0.05)
    Body humerus_r: mass=1.69419 mass_center=(0 -0.1665504 0) inertia=(0.01020711 0.003521138 0.01145716 0 0 0)
        meshes=humerus_rv.vtp
    Body humerus_l: mass=1.69419 mass_center=(0 -0.1665504 0) inertia=(0.01020711 0.003521138 0.01145716 0 0 0)
        meshes=humerus_lv.vtp
    Body ulna_l: mass=0.5063814 mass_center=(0 -0.1323218 0) inertia=(0.002975947 0.0006209099 0.003228129 0 0 0)
        meshes=ulna_lv.vtp
    Body radius_l: mass=0.5063814 mass_center=(0 -0.1323218 0) inertia=(0.002975947 0.0006209099 0.003228129 0 0 0)
        meshes=radius_lv.vtp
    Body hand_l: mass=0.381349 mass_center=(0 -0.07476004 0) inertia=(0.0008962001 0.0005495756 0.00134631 0 0 0)
        meshes=(pisiform_lvs.vtp lunate_lvs.vtp scaphoid_lvs.vtp triquetrum_lvs.vtp hamate_lvs.vtp capitate_lvs.vtp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)
    Body skin_humerus_r: mass=1.69419 mass_center=(0 0 0) inertia=(0.01020711 0.003521138 0.01 0 0 0) Position=(0 0 0)
        meshes=D:\GaitCode\pose2sim-main\Pose2Sim\Demo_SinglePerson\parts\main\upper-arm_r.stl
    Body skin_humerus_l: mass=1.69419 mass_center=(0 0 0) inertia=(0.01020711 0.003521138 0.01 0 0 0) Position=(0 0 0)
        meshes=D:\GaitCode\pose2sim-main\Pose2Sim\Demo_SinglePerson\parts\main\upper-arm_r.stl
    Body ulna_r: mass=0.5063814 mass_center=(0 -0.1323218 0) inertia=(0.002975947 0.0006209099 0.003228129 0 0 0)
        meshes=ulna_rv.vtp
    Body skin_ulna_r: mass=1.69419 mass_center=(0 0 0) inertia=(0.002975947 0.0006209099 0.003228129 0 0 0)
        Position=(0 0 0) meshes=D:\GaitCode\pose2sim-main\Pose2Sim\Demo_SinglePerson\parts\main\pre-arm_r.stl
    Body skin_ulna_l: mass=1.69419 mass_center=(0 0 0) inertia=(0.002975947 0.0006209099 0.003228129 0 0 0)
        Position=(0 0 0) meshes=D:\GaitCode\pose2sim-main\Pose2Sim\Demo_SinglePerson\parts\main\pre-arm_r.stl
    Body radius_r: mass=0.5063814 mass_center=(0 -0.1323218 0) inertia=(0.002975947 0.0006209099 0.003228129 0 0 0)
        meshes=radius_rv.vtp
    Body hand_r: mass=0.381349 mass_center=(0 -0.07476004 0) inertia=(0.0008962001 0.0005495756 0.00134631 0 0 0)
        meshes=(pisiform_rvs.vtp lunate_rvs.vtp scaphoid_rvs.vtp triquetrum_rvs.vtp hamate_rvs.vtp capitate_rvs.vtp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)
    Body skin_hand_r: mass=1.69419 mass_center=(0 0 0) Position=(0 0 0)
        meshes=D:\GaitCode\pose2sim-main\Pose2Sim\Demo_SinglePerson\parts\main\hand_r.stl
    Body skin_hand_l: mass=1.69419 mass_center=(0 0 0) Position=(0 0 0)
        meshes=D:\GaitCode\pose2sim-main\Pose2Sim\Demo_SinglePerson\parts\main\hand_r.stl
    Body skin_femur_r: mass=7.753179 mass_center=(0 0 0) inertia=(0.1392001 0.03648934 0.146789 0 0 0) Position=(0 0 0)
        meshes=D:\GaitCode\pose2sim-main\Pose2Sim\Demo_SinglePerson\parts\main\thigh_r.stl
    Body skin_tibia_r: mass=3.090385 mass_center=(0 0 0) inertia=(0.04145642 0.004194995 0.0420322 0 0 0)
        Position=(0 0 0) meshes=D:\GaitCode\pose2sim-main\Pose2Sim\Demo_SinglePerson\parts\main\leg_r.stl
    Body skin_talus_r: mass=0.08335497 mass_center=(0 0 0) inertia=(0.0007222634 0.0007222634 0.0007222634 0 0 0)
        Position=(0 0 0) meshes=D:\GaitCode\pose2sim-main\Pose2Sim\Demo_SinglePerson\parts\main\feet_r.stl
    Body skin_femur_l: mass=7.753179 mass_center=(0 0 0) inertia=(0.1392001 0.03648934 0.146789 0 0 0) Position=(0 0 0)
        meshes=D:\GaitCode\pose2sim-main\Pose2Sim\Demo_SinglePerson\parts\main\thigh_l.stl
    Body skin_pelvis: mass=9.816714 mass_center=(0 0 0) inertia=(0.07309162 0.06192879 0.04116736 0 0 0)
        Position=(0 0 0) meshes=D:\GaitCode\pose2sim-main\Pose2Sim\Demo_SinglePerson\parts\main\pelvis.stl
    Body skin_torso: mass=18.77987 mass_center=(0 0 0) inertia=(0.9145838 0.4686118 0.8878503 0 0 0) Position=(0 0 0)
        meshes=D:\GaitCode\pose2sim-main\Pose2Sim\Demo_SinglePerson\parts\main\torso.stl
    Body skin_tibia_l: mass=3.090385 mass_center=(0 0 0) inertia=(0.04145642 0.004194995 0.0420322 0 0 0)
        Position=(0 0 0) meshes=D:\GaitCode\pose2sim-main\Pose2Sim\Demo_SinglePerson\parts\main\leg_l.stl
    Body skin_talus_l: mass=0.08335497 mass_center=(0 0 0) inertia=(0.0007222634 0.0007222634 0.0007222634 0 0 0)
        Position=(0 0 0) meshes=D:\GaitCode\pose2sim-main\Pose2Sim\Demo_SinglePerson\parts\main\feet_r.stl
  JointSet:
    CustomJoint ground_pelvis: socket_parent_frame=ground_offset socket_child_frame=pelvis_offset
      Coordinate pelvis_tilt: default_value=0 range=(-1.570796 1.570796) clamped=false
      Coordinate pelvis_list: default_value=0 range=(-1.570796 1.570796) clamped=false
      Coordinate pelvis_rotation: default_value=0 range=(-1.570796 1.570796) clamped=false
      Coordinate pelvis_tx: default_value=0 range=(-5 5) clamped=false
      Coordinate pelvis_ty: default_value=0.94 range=(-1 2) clamped=false
      Coordinate pelvis_tz: default_value=0 range=(-3 3) clamped=false
      PhysicalOffsetFrame ground_offset: socket_parent=/ground translation=(0 0 0) [meters]
      PhysicalOffsetFrame pelvis_offset: socket_parent=/bodyset/pelvis translation=(0 0 0)
      SpatialTransform:
        TransformAxis rotation1: coordinates=pelvis_tilt axis=(0 0 1) LinearFunction(coefficients=1 0)
        TransformAxis rotation2: coordinates=pelvis_list axis=(1 0 0) LinearFunction(coefficients=1 0)
        TransformAxis rotation3: coordinates=pelvis_rotation axis=(0 1 0) LinearFunction(coefficients=1 0)
        TransformAxis translation1: coordinates=pelvis_tx axis=(1 0 0) LinearFunction(coefficients=1 0)
        TransformAxis translation2: coordinates=pelvis_ty axis=(0 1 0) LinearFunction(coefficients=1 0)
        TransformAxis translation3: coordinates=pelvis_tz axis=(0 0 1) LinearFunction(coefficients=1 0)
    WeldJoint sacrumjnt: socket_parent_frame=pelvis_offset socket_child_frame=sacrum_offset
      PhysicalOffsetFrame pelvis_offset: socket_parent=/bodyset/pelvis translation=(0.009235735 -0.01570075 0)
      PhysicalOffsetFrame sacrum_offset: socket_parent=/bodyset/sacrum translation=(0 0 0)
    # 绑定右大臂皮肤的 Joint
    WeldJoint humerus_r_skin_attachment: socket_parent_frame=humerus_r_offset socket_child_frame=humerus_r_skin_frame
      PhysicalOffsetFrame humerus_r_offset: socket_parent=/bodyset/humerus_r translation=(0 -0.05 0)
      PhysicalOffsetFrame humerus_r_skin_frame: socket_parent=/bodyset/skin_humerus_r translation=(0 0 0)
    # 绑定右小臂皮肤的 Joint
    WeldJoint ulna_r_skin_attachment: socket_parent_frame=ulna_r_offset socket_child_frame=ulna_r_skin_frame
      PhysicalOffsetFrame ulna_r_offset: socket_parent=/bodyset/ulna_r translation=(-0.01 -0.135 0.025)
      PhysicalOffsetFrame ulna_r_skin_frame: socket_parent=/bodyset/skin_ulna_r translation=(0 0 0.01)
    # 绑定右手皮肤的 Joint
    WeldJoint hand_r_skin_attachment: socket_parent_frame=hand_r_offset socket_child_frame=hand_r_skin_frame
      PhysicalOffsetFrame hand_r_offset: socket_parent=/bodyset/hand_r translation=(0 -0.07476004 0)
      PhysicalOffsetFrame hand_r_skin_frame: socket_parent=/bodyset/skin_hand_r translation=(0 0 0)
    CustomJoint hip_r: socket_parent_frame=pelvis_offset socket_child_frame=femur_r_offset
      Coordinate hip_flexion_r: default_value=1.567005e-9 range=(-0.87 2.61799) clamped=true
      Coordinate hip_adduction_r: default_value=-9.463479e-10 range=(-1.047198 0.5235988) clamped=true
      Coordinate hip_rotation_r: default_value=0 range=(-1.22173 0.6981317) clamped=true
      PhysicalOffsetFrame pelvis_offset: socket_parent=/bodyset/pelvis translation=(-0.06529665 -0.06104821 0.07711839)
      PhysicalOffsetFrame femur_r_offset: socket_parent=/bodyset/femur_r translation=(0 0 0)
      SpatialTransform: axes_held_at_zero=(translation1 translation2 translation3)
        TransformAxis rotation1: coordinates=hip_flexion_r axis=(0 0 1) LinearFunction(coefficients=1 0)
        TransformAxis rotation2: coordinates=hip_adduction_r axis=(1 0 0) LinearFunction(coefficients=1 0)
        TransformAxis rotation3: coordinates=hip_rotation_r axis=(0 1 0) LinearFunction(coefficients=1 0)
    # 绑定右大腿皮肤的 Joint
    WeldJoint femur_r_skin_attachment: socket_parent_frame=femur_r_offset socket_child_frame=femur_r_skin_frame
      PhysicalOffsetFrame femur_r_offset: socket_parent=/bodyset/femur_r translation=(0 0 0)
      PhysicalOffsetFrame femur_r_skin_frame: socket_parent=/bodyset/skin_femur_r translation=(0 0.22 0)
    # 绑定右小腿皮肤的 Joint
    WeldJoint tibia_r_skin_attachment: socket_parent_frame=tibia_r_offset socket_child_frame=tibia_r_skin_frame
      PhysicalOffsetFrame tibia_r_offset: socket_parent=/bodyset/tibia_r translation=(0 -0.1854638 0)
      PhysicalOffsetFrame tibia_r_skin_frame: socket_parent=/bodyset/skin_tibia_r translation=(0 0 0)
    # 绑定右脚皮肤的 Joint
    WeldJoint talus_r_skin_attachment: socket_parent_frame=talus_r_offset socket_child_frame=talus_r_skin_frame
      PhysicalOffsetFrame talus_r_offset: socket_parent=/bodyset/calcn_r translation=(0 0 0)
      PhysicalOffsetFrame talus_r_skin_frame: socket_parent=/bodyset/skin_talus_r translation=(-0.1 0 0)
    # 绑定骨盆皮肤的 Joint
    WeldJoint pelvis_skin_attachment: socket_parent_frame=pelvis_offset socket_child_frame=pelvis_skin_frame
      PhysicalOffsetFrame pelvis_offset: socket_parent=/bodyset/pelvis translation=(0 0 0)
      PhysicalOffsetFrame pelvis_skin_frame: socket_parent=/bodyset/skin_pelvis translation=(0.06 0.16 0)
    # 绑定躯干皮肤的 Joint
    WeldJoint torso_skin_attachment: socket_parent_frame=torso_offset socket_child_frame=torso_skin_frame
      PhysicalOffsetFrame torso_offset: socket_parent=/bodyset/torso translation=(0 0 0)
      PhysicalOffsetFrame torso_skin_frame: socket_parent=/bodyset/skin_torso translation=(0 -0.3 0)
    # 绑定左大臂皮肤的 Joint
    WeldJoint humerus_l_skin_attachment: socket_parent_frame=humerus_l_offset socket_child_frame=humerus_l_skin_frame
      PhysicalOffsetFrame humerus_l_offset: socket_parent=/bodyset/humerus_l translation=(0 -0.05 0)
      PhysicalOffsetFrame humerus_l_skin_frame: socket_parent=/bodyset/skin_humerus_l translation=(0 0 0)
    # 绑定左小臂皮肤的 Joint
    WeldJoint ulna_l_skin_attachment: socket_parent_frame=ulna_l_offset socket_child_frame=ulna_l_skin_frame
      PhysicalOffsetFrame ulna_l_offset: socket_parent=/bodyset/ulna_l translation=(-0.01 -0.135 0.025)
      PhysicalOffsetFrame ulna_l_skin_frame: socket_parent=/bodyset/skin_ulna_l translation=(0 0 0.04)
    # 绑定左手皮肤的 Joint
    WeldJoint hand_l_skin_attachment: socket_parent_frame=hand_l_offset socket_child_frame=hand_l_skin_frame
      PhysicalOffsetFrame hand_l_offset: socket_parent=/bodyset/hand_l translation=(0 0 0)
      PhysicalOffsetFrame hand_l_skin_frame: socket_parent=/bodyset/skin_hand_l translation=(0 0 0)
    # 绑定左大腿皮肤的 Joint
    WeldJoint femur_l_skin_attachment: socket_parent_frame=femur_l_offset socket_child_frame=femur_l_skin_frame
      PhysicalOffsetFrame femur_l_offset: socket_parent=/bodyset/femur_l translation=(0 0 0)
      PhysicalOffsetFrame femur_l_skin_frame: socket_parent=/bodyset/skin_femur_l translation=(0 0.22 0)
    # 绑定左小腿皮肤的 Joint
    WeldJoint tibia_l_skin_attachment: socket_parent_frame=tibia_l_offset socket_child_frame=tibia_l_skin_frame
      PhysicalOffsetFrame tibia_l_offset: socket_parent=/bodyset/tibia_l translation=(0 -0.185 0)
      PhysicalOffsetFrame tibia_l_skin_frame: socket_parent=/bodyset/skin_tibia_l translation=(0 0 0)
    # 绑定左脚皮肤的 Joint
    WeldJoint talus_l_skin_attachment: socket_parent_frame=talus_l_offset socket_child_frame=talus_l_skin_frame
      PhysicalOffsetFrame talus_l_offset: socket_parent=/bodyset/calcn_l translation=(0 0 0)
      PhysicalOffsetFrame talus_l_skin_frame: socket_parent=/bodyset/skin_talus_l translation=(-0.1 0 0)
    # 绑定头部皮肤的 Joint
    WeldJoint head_skin_attachment: socket_parent_frame=head_offset socket_child_frame=head_skin_frame
      PhysicalOffsetFrame head_offset: socket_parent=/bodyset/head translation=(0 0 0)
      PhysicalOffsetFrame head_skin_frame: socket_parent=/bodyset/skin_head translation=(0 -0.69 0)
    CustomJoint walker_knee_r: socket_parent_frame=femur_r_offset socket_child_frame=tibia_r_offset
      Coordinate knee_angle_r: default_value=7.691617e-5 range=(0 2.70526) clamped=true
      PhysicalOffsetFrame femur_r_offset: socket_parent=/bodyset/femur_r
          translation=(-0.009034668 -0.4555974 -0.003071117) orientation=(-1.64157 1.44618 1.5708) [radians]
      PhysicalOffsetFrame tibia_r_offset: socket_parent=/bodyset/tibia_r
          translation=(-0.008035978 -0.01046505 -0.001474909) orientation=(-1.64157 1.44618 1.5708)
      SpatialTransform: axes_held_at_zero=translation3
        TransformAxis rotation1: coordinates=knee_angle_r axis=(1 0 0) LinearFunction(coefficients=1 0)
        TransformAxis rotation2: coordinates=knee_angle_r axis=(0 0 1)
          SimmSpline: x=(0 0.174533 0.349066 0.523599 0.698132 0.872665 1.0472 1.22173 1.39626 1.5708 1.74533 1.91986 2.0944)
              y=(0 0.0126809 0.0226969 0.0296054 0.0332049 0.0335354 0.0308779 0.0257548 0.0189295 0.011407 0.00443314 -0.00050475 -0.0016782)
        TransformAxis rotation3: coordinates=knee_angle_r axis=(0 1 0)
          SimmSpline: x=(0 0.174533 0.349066 0.523599 0.698132 0.872665 1.0472 1.22173 1.39626 1.5708 1.74533 1.91986 2.0944)
              y=(0 0.059461 0.109399 0.150618 0.18392 0.210107 0.229983 0.24435 0.254012 0.25977 0.262428 0.262788 0.261654)
        TransformAxis translation1: coordinates=knee_angle_r axis=(0 1 0)
          MultiplierFunction: scale=1.11677
            SimmSpline: x=(0 0.174533 0.349066 0.523599 0.698132 0.872665 1.0472 1.22173 1.39626 1.5708 1.74533 1.91986 2.0944)
                y=(0 0.000479 0.000835 0.001086 0.001251 0.001346 0.001391 0.001403 0.0014 0.0014 0.001421 0.001481 0.001599)
        TransformAxis translation2: coordinates=knee_angle_r axis=(0 0 1)
          MultiplierFunction: scale=1.11677
            SimmSpline: x=(0 0.174533 0.349066 0.523599 0.698132 0.872665 1.0472 1.22173 1.39626 1.5708 1.74533 1.91986 2.0944)
                y=(0 0.000988 0.001899 0.002734 0.003492 0.004173 0.004777 0.005305 0.005756 0.00613 0.006427 0.006648 0.006792)
    CustomJoint patellofemoral_r: socket_parent_frame=femur_r_offset socket_child_frame=patella_r_offset
      Coordinate knee_angle_r_beta: default_value=7.691617e-5 range=(-99999.9 99999.9) clamped=false
      PhysicalOffsetFrame femur_r_offset: socket_parent=/bodyset/femur_r
          translation=(-0.009034668 -0.4555974 -0.003071117)
      PhysicalOffsetFrame patella_r_offset: socket_parent=/bodyset/patella_r translation=(0 0 0)
      SpatialTransform: axes_held_at_zero=(rotation2 rotation3)
        TransformAxis rotation1: coordinates=knee_angle_r_beta axis=(0 0 1)
          SimmSpline: x=(0 0.174533 0.349066 0.523599 0.698132 0.872665 1.0472 1.22173 1.39626 1.5708 1.74533 1.91986 2.0944)
              y=(0.00113686 -0.00629212 -0.105582 -0.253683 -0.414245 -0.579047 -0.747244 -0.91799 -1.09044 -1.26379 -1.43763 -1.61186 -1.78634)
        TransformAxis translation1: coordinates=knee_angle_r_beta axis=(1 0 0)
          MultiplierFunction: scale=1.11677
            SimmSpline: x=(0 0.174533 0.349066 0.523599 0.698132 0.872665 1.0472 1.22173 1.39626 1.5708 1.74533 1.91986 2.0944)
                y=(0.0524 0.0488 0.0437 0.0371 0.0296 0.0216 0.0136 0.0057 -0.0019 -0.0088 -0.0148 -0.0196 -0.0227)
        TransformAxis translation2: coordinates=knee_angle_r_beta axis=(0 1 0)
          MultiplierFunction: scale=1.11677
            SimmSpline: x=(0 0.174533 0.349066 0.523599 0.698132 0.872665 1.0472 1.22173 1.39626 1.5708 1.74533 1.91986 2.0944)
                y=(-0.0108 -0.019 -0.0263 -0.0322 -0.0367 -0.0395 -0.0408 -0.0404 -0.0384 -0.0349 -0.0301 -0.0245 -0.0187)
        TransformAxis translation3: axis=(0 0 1) MultiplierFunction(scale=1.11677, Constant(value=0.00275))
    CustomJoint ankle_r: socket_parent_frame=tibia_r_offset socket_child_frame=talus_r_offset
      Coordinate ankle_angle_r: default_value=0 range=(-1.047198 1.047198) clamped=false
      PhysicalOffsetFrame tibia_r_offset: socket_parent=/bodyset/tibia_r translation=(0 -0.4271529 0)
      PhysicalOffsetFrame talus_r_offset: socket_parent=/bodyset/talus_r translation=(0 0 0)
      SpatialTransform: axes_held_at_zero=(rotation2 rotation3 translation1 translation2 translation3)
        TransformAxis rotation1: coordinates=ankle_angle_r axis=(-0.1050135 -0.1740224 0.9791263)
            LinearFunction(coefficients=1 0)
    PinJoint subtalar_r: socket_parent_frame=talus_r_offset socket_child_frame=calcn_r_offset
      Coordinate subtalar_angle_r: default_value=0 range=(-0.3490659 0.3490659) clamped=true
      PhysicalOffsetFrame talus_r_offset: socket_parent=/bodyset/talus_r
          translation=(-0.0453978 -0.03904937 0.007372372) orientation=(-1.76819 0.906223 1.8196)
      PhysicalOffsetFrame calcn_r_offset: socket_parent=/bodyset/calcn_r translation=(0 0 0)
          orientation=(-1.76819 0.906223 1.8196)
    PinJoint mtp_r: socket_parent_frame=calcn_r_offset socket_child_frame=toes_r_offset
      Coordinate mtp_angle_r: default_value=0 range=(-0.5235988 0.5235988) clamped=true locked=true
      PhysicalOffsetFrame calcn_r_offset: socket_parent=/bodyset/calcn_r
          translation=(0.1664369 -0.00186171 0.001005323) orientation=(-3.14159 0.619901 0)
      PhysicalOffsetFrame toes_r_offset: socket_parent=/bodyset/toes_r translation=(0 0 0)
          orientation=(-3.14159 0.619901 0)
    CustomJoint hip_l: socket_parent_frame=pelvis_offset socket_child_frame=femur_l_offset
      Coordinate hip_flexion_l: default_value=1.567005e-9 range=(-0.87 2.61799) clamped=true
      Coordinate hip_adduction_l: default_value=-9.463479e-10 range=(-1.047198 0.5235988) clamped=true
      Coordinate hip_rotation_l: default_value=0 range=(-1.22173 0.6981317) clamped=true
      PhysicalOffsetFrame pelvis_offset: socket_parent=/bodyset/pelvis
          translation=(-0.06529665 -0.06104821 -0.07711839)
      PhysicalOffsetFrame femur_l_offset: socket_parent=/bodyset/femur_l translation=(0 0 0)
      SpatialTransform: axes_held_at_zero=(translation1 translation2 translation3)
        TransformAxis rotation1: coordinates=hip_flexion_l axis=(0 0 1) LinearFunction(coefficients=1 0)
        TransformAxis rotation2: coordinates=hip_adduction_l axis=(1 0 0) LinearFunction(coefficients=-1 0)
        TransformAxis rotation3: coordinates=hip_rotation_l axis=(0 1 0) LinearFunction(coefficients=-1 0)
    CustomJoint walker_knee_l: socket_parent_frame=femur_l_offset socket_child_frame=tibia_l_offset
      Coordinate knee_angle_l: default_value=7.691617e-5 range=(0 2.70526) clamped=true
      PhysicalOffsetFrame femur_l_offset: socket_parent=/bodyset/femur_l
          translation=(-0.009034668 -0.4555974 0.003071117) orientation=(1.64157 -1.44618 1.5708)
      PhysicalOffsetFrame tibia_l_offset: socket_parent=/bodyset/tibia_l
          translation=(-0.008035978 -0.01046505 0.001474909) orientation=(1.64157 -1.44618 1.5708)
      SpatialTransform: axes_held_at_zero=translation3
        TransformAxis rotation1: coordinates=knee_angle_l axis=(-1 0 0) LinearFunction(coefficients=1 0)
        TransformAxis rotation2: coordinates=knee_angle_l axis=(0 0 1)
          SimmSpline: x=(0 0.174533 0.349066 0.523599 0.698132 0.872665 1.0472 1.22173 1.39626 1.5708 1.74533 1.91986 2.0944)
              y=(0 0.0126809 0.0226969 0.0296054 0.0332049 0.0335354 0.0308779 0.0257548 0.0189295 0.011407 0.00443314 -0.00050475 -0.0016782)
        TransformAxis rotation3: coordinates=knee_angle_l axis=(0 1 0)
          SimmSpline: x=(0 0.174533 0.349066 0.523599 0.698132 0.872665 1.0472 1.22173 1.39626 1.5708 1.74533 1.91986 2.0944)
              y=(0 -0.059461 -0.109399 -0.150618 -0.18392 -0.210107 -0.229983 -0.24435 -0.254012 -0.25977 -0.262428 -0.262788 -0.261654)
        TransformAxis translation1: coordinates=knee_angle_l axis=(0 1 0)
          MultiplierFunction: scale=1.11677
            SimmSpline: x=(0 0.174533 0.349066 0.523599 0.698132 0.872665 1.0472 1.22173 1.39626 1.5708 1.74533 1.91986 2.0944)
                y=(0 0.000479 0.000835 0.001086 0.001251 0.001346 0.001391 0.001403 0.0014 0.0014 0.001421 0.001481 0.001599)
        TransformAxis translation2: coordinates=knee_angle_l axis=(0 0 1)
          MultiplierFunction: scale=1.11677
            SimmSpline: x=(0 0.174533 0.349066 0.523599 0.698132 0.872665 1.0472 1.22173 1.39626 1.5708 1.74533 1.91986 2.0944)
                y=(0 -0.000988 -0.001899 -0.002734 -0.003492 -0.004173 -0.004777 -0.005305 -0.005756 -0.00613 -0.006427 -0.006648 -0.006792)
    CustomJoint patellofemoral_l: socket_parent_frame=femur_l_offset socket_child_frame=patella_l_offset
      Coordinate knee_angle_l_beta: default_value=7.691617e-5 range=(-99999.9 99999.9) clamped=false
      PhysicalOffsetFrame femur_l_offset: socket_parent=/bodyset/femur_l
          translation=(-0.009034668 -0.4555974 0.003071117)
      PhysicalOffsetFrame patella_l_offset: socket_parent=/bodyset/patella_l translation=(0 0 0)
      SpatialTransform: axes_held_at_zero=(rotation2 rotation3)
        TransformAxis rotation1: coordinates=knee_angle_l_beta axis=(0 0 1)
          SimmSpline: x=(0 0.174533 0.349066 0.523599 0.698132 0.872665 1.0472 1.22173 1.39626 1.5708 1.74533 1.91986 2.0944)
              y=(0.00113686 -0.00629212 -0.105582 -0.253683 -0.414245 -0.579047 -0.747244 -0.91799 -1.09044 -1.26379 -1.43763 -1.61186 -1.78634)
        TransformAxis translation1: coordinates=knee_angle_l_beta axis=(1 0 0)
          MultiplierFunction: scale=1.11677
            SimmSpline: x=(0 0.174533 0.349066 0.523599 0.698132 0.872665 1.0472 1.22173 1.39626 1.5708 1.74533 1.91986 2.0944)
                y=(0.0524 0.0488 0.0437 0.0371 0.0296 0.0216 0.0136 0.0057 -0.0019 -0.0088 -0.0148 -0.0196 -0.0227)
        TransformAxis translation2: coordinates=knee_angle_l_beta axis=(0 1 0)
          MultiplierFunction: scale=1.11677
            SimmSpline: x=(0 0.174533 0.349066 0.523599 0.698132 0.872665 1.0472 1.22173 1.39626 1.5708 1.74533 1.91986 2.0944)
                y=(-0.0108 -0.019 -0.0263 -0.0322 -0.0367 -0.0395 -0.0408 -0.0404 -0.0384 -0.0349 -0.0301 -0.0245 -0.0187)
        TransformAxis translation3: axis=(0 0 1) MultiplierFunction(scale=1.11677, Constant(value=-0.00275))
    CustomJoint ankle_l: socket_parent_frame=tibia_l_offset socket_child_frame=talus_l_offset
      Coordinate ankle_angle_l: default_value=0 range=(-1.047198 1.047198) clamped=true
      PhysicalOffsetFrame tibia_l_offset: socket_parent=/bodyset/tibia_l translation=(0 -0.4271529 0)
      PhysicalOffsetFrame talus_l_offset: socket_parent=/bodyset/talus_l translation=(0 0 0)
      SpatialTransform: axes_held_at_zero=(rotation2 rotation3 translation1 translation2 translation3)
        TransformAxis rotation1: coordinates=ankle_angle_l axis=(0.1050135 0.1740224 0.9791263)
            LinearFunction(coefficients=1 0)
    PinJoint subtalar_l: socket_parent_frame=talus_l_offset socket_child_frame=calcn_l_offset
      Coordinate subtalar_angle_l: default_value=0 range=(-0.3490659 0.3490659) clamped=true
      PhysicalOffsetFrame talus_l_offset: socket_parent=/bodyset/talus_l
          translation=(-0.0453978 -0.03904937 -0.007372372) orientation=(1.76819 -0.906223 1.8196)
      PhysicalOffsetFrame calcn_l_offset: socket_parent=/bodyset/calcn_l translation=(0 0 0)
          orientation=(1.76819 -0.906223 1.8196)
    PinJoint mtp_l: socket_parent_frame=calcn_l_offset socket_child_frame=toes_l_offset
      Coordinate mtp_angle_l: default_value=0 range=(-0.5235988 0.5235988) clamped=true locked=true
      PhysicalOffsetFrame calcn_l_offset: socket_parent=/bodyset/calcn_l
          translation=(0.1664369 -0.00186171 -0.001005323) orientation=(-3.14159 -0.619901 0)
      PhysicalOffsetFrame toes_l_offset: socket_parent=/bodyset/toes_l translation=(0 0 0)
          orientation=(-3.14159 -0.619901 0)
    CustomJoint L5_S1_IVDjnt: socket_parent_frame=sacrum_offset socket_child_frame=lumbar5_offset
      Coordinate L5_S1_Flex_Ext: default_value=0 range=(-0.1954769 0.06352998) clamped=false
      Coordinate L5_S1_Lat_Bending: default_value=0 range=(-0.03926991 0.03926991) clamped=false
      Coordinate L5_S1_axial_rotation: default_value=0 range=(-0.1759292 0.1759292) clamped=false
      PhysicalOffsetFrame sacrum_offset: socket_parent=/bodyset/sacrum translation=(-0.09051021 0.06557372 0)
      PhysicalOffsetFrame lumbar5_offset: socket_parent=/bodyset/lumbar5 translation=(0 0 0)
      SpatialTransform: axes_held_at_zero=(translation1 translation2 translation3)
        TransformAxis rotation1: coordinates=L5_S1_Flex_Ext axis=(0 0 1) LinearFunction(coefficients=1 0)
        TransformAxis rotation2: coordinates=L5_S1_Lat_Bending axis=(1 0 0) LinearFunction(coefficients=1 0)
        TransformAxis rotation3: coordinates=L5_S1_axial_rotation axis=(0 1 0) LinearFunction(coefficients=1 0)
    CustomJoint L4_L5_IVDjnt: socket_parent_frame=lumbar5_offset socket_child_frame=lumbar4_offset
      Coordinate L4_L5_Flex_Ext: default_value=0 range=(-99999.9 99999.9) clamped=false
      Coordinate L4_L5_Lat_Bending: default_value=0 range=(-99999.9 99999.9) clamped=false
      Coordinate L4_L5_axial_rotation: default_value=0 range=(-99999.9 99999.9) clamped=false
      PhysicalOffsetFrame lumbar5_offset: socket_parent=/bodyset/lumbar5 translation=(0.008961681 0.02652657 0)
      PhysicalOffsetFrame lumbar4_offset: socket_parent=/bodyset/lumbar4 translation=(0.0008961681 -0.00224042 0)
      SpatialTransform: axes_held_at_zero=(translation1 translation2 translation3)
        TransformAxis rotation1: coordinates=L4_L5_Flex_Ext axis=(0 0 1) LinearFunction(coefficients=1 0)
        TransformAxis rotation2: coordinates=L4_L5_Lat_Bending axis=(1 0 0) LinearFunction(coefficients=1 0)
        TransformAxis rotation3: coordinates=L4_L5_axial_rotation axis=(0 1 0) LinearFunction(coefficients=1 0)
    CustomJoint L3_L4_IVDjnt: socket_parent_frame=lumbar4_offset socket_child_frame=lumbar3_offset
      Coordinate L3_L4_Flex_Ext: default_value=0 range=(-99999.9 99999.9) clamped=false
      Coordinate L3_L4_Lat_Bending: default_value=0 range=(-99999.9 99999.9) clamped=false
      Coordinate L3_L4_axial_rotation: default_value=0 range=(-99999.9 99999.9) clamped=false
      PhysicalOffsetFrame lumbar4_offset: socket_parent=/bodyset/lumbar4 translation=(0 0.02867738 0)
      PhysicalOffsetFrame lumbar3_offset: socket_parent=/bodyset/lumbar3 translation=(-0.0005377008 -0.001075402 0)
      SpatialTransform: axes_held_at_zero=(translation1 translation2 translation3)
        TransformAxis rotation1: coordinates=L3_L4_Flex_Ext axis=(0 0 1) LinearFunction(coefficients=1 0)
        TransformAxis rotation2: coordinates=L3_L4_Lat_Bending axis=(1 0 0) LinearFunction(coefficients=1 0)
        TransformAxis rotation3: coordinates=L3_L4_axial_rotation axis=(0 1 0) LinearFunction(coefficients=1 0)
    CustomJoint L2_L3_IVD_jnt: socket_parent_frame=lumbar3_offset socket_child_frame=lumbar2_offset
      Coordinate L2_L3_Flex_Ext: default_value=0 range=(-99999.9 99999.9) clamped=false
      Coordinate L2_L3_Lat_Bending: default_value=0 range=(-99999.9 99999.9) clamped=false
      Coordinate L2_L3_axial_rotation: default_value=0 range=(-99999.9 99999.9) clamped=false
      PhysicalOffsetFrame lumbar3_offset: socket_parent=/bodyset/lumbar3 translation=(-0.007169344 0.02796044 0)
      PhysicalOffsetFrame lumbar2_offset: socket_parent=/bodyset/lumbar2 translation=(-0.001165018 -0.003495055 0)
      SpatialTransform: axes_held_at_zero=(translation1 translation2 translation3)
        TransformAxis rotation1: coordinates=L2_L3_Flex_Ext axis=(0 0 1) LinearFunction(coefficients=1 0)
        TransformAxis rotation2: coordinates=L2_L3_Lat_Bending axis=(1 0 0) LinearFunction(coefficients=1 0)
        TransformAxis rotation3: coordinates=L2_L3_axial_rotation axis=(0 1 0) LinearFunction(coefficients=1 0)
    CustomJoint L1_L2_IVD_jnt: socket_parent_frame=lumbar2_offset socket_child_frame=lumbar1_offset
      Coordinate L1_L2_Flex_Ext: default_value=0 range=(-99999.9 99999.9) clamped=false
      Coordinate L1_L2_Lat_Bending: default_value=0 range=(-99999.9 99999.9) clamped=false
      Coordinate L1_L2_axial_rotation: default_value=0 range=(-99999.9 99999.9) clamped=false
      PhysicalOffsetFrame lumbar2_offset: socket_parent=/bodyset/lumbar2 translation=(-0.008961681 0.0224042 0)
      PhysicalOffsetFrame lumbar1_offset: socket_parent=/bodyset/lumbar1 translation=(0.001254635 -0.003405439 0)
      SpatialTransform: axes_held_at_zero=(translation1 translation2 translation3)
        TransformAxis rotation1: coordinates=L1_L2_Flex_Ext axis=(0 0 1) LinearFunction(coefficients=1 0)
        TransformAxis rotation2: coordinates=L1_L2_Lat_Bending axis=(1 0 0) LinearFunction(coefficients=1 0)
        TransformAxis rotation3: coordinates=L1_L2_axial_rotation axis=(0 1 0) LinearFunction(coefficients=1 0)
    CustomJoint L1_T12_IVD_jnt: socket_parent_frame=lumbar1_offset socket_child_frame=torso_offset
      Coordinate L1_T12_Flex_Ext: default_value=0 range=(-99999.9 99999.9) clamped=false
      Coordinate L1_T12_Lat_Bending: default_value=0 range=(-99999.9 99999.9) clamped=false
      Coordinate L1_T12_axial_rotation: default_value=0 range=(-1.1 1.1) clamped=false
      PhysicalOffsetFrame lumbar1_offset: socket_parent=/bodyset/lumbar1 translation=(-0.009320148 0.02464462 0)
      PhysicalOffsetFrame torso_offset: socket_parent=/bodyset/torso translation=(-0.01156057 0.1034178 0)
      SpatialTransform: axes_held_at_zero=(translation1 translation2 translation3)
        TransformAxis rotation1: coordinates=L1_T12_Flex_Ext axis=(0 0 1) LinearFunction(coefficients=1 0)
        TransformAxis rotation2: coordinates=L1_T12_Lat_Bending axis=(1 0 0) LinearFunction(coefficients=1 0)
        TransformAxis rotation3: coordinates=L1_T12_axial_rotation axis=(0 1 0) LinearFunction(coefficients=1 0)
    CustomJoint Abdjnt: socket_parent_frame=sacrum_offset socket_child_frame=Abdomen_offset
      Coordinate Abs_r3: default_value=0 range=(-1.7 1.7) clamped=false
      Coordinate Abs_r2: default_value=0 range=(-1.7 1.7) clamped=false
      Coordinate Abs_r1: default_value=0 range=(-1.7 1.7) clamped=false
      Coordinate Abs_t1: default_value=0 range=(-99999.9 99999.9) clamped=false locked=true
      Coordinate Abs_t2: default_value=0 range=(-99999.9 99999.9) clamped=false locked=true
      PhysicalOffsetFrame sacrum_offset: socket_parent=/bodyset/sacrum translation=(-0.09051021 0.06557372 0)
      PhysicalOffsetFrame Abdomen_offset: socket_parent=/bodyset/Abdomen translation=(-0.09 -0.09 0)
      SpatialTransform: axes_held_at_zero=translation3
        TransformAxis rotation1: coordinates=Abs_r3 axis=(0 0 1) LinearFunction(coefficients=1 0)
        TransformAxis rotation2: coordinates=Abs_r2 axis=(1 0 0) LinearFunction(coefficients=1 0)
        TransformAxis rotation3: coordinates=Abs_r1 axis=(0 1 0) LinearFunction(coefficients=1 0)
        TransformAxis translation1: coordinates=Abs_t1 axis=(1 0 0) LinearFunction(coefficients=1 0)
        TransformAxis translation2: coordinates=Abs_t2 axis=(0 1 0) LinearFunction(coefficients=1 0)
    CustomJoint head_torso: socket_parent_frame=torso_offset socket_child_frame=head_offset
      Coordinate neck_flexion: default_value=5.488091e-11 range=(-0.5 0.5) clamped=true
      Coordinate neck_bending: default_value=0 range=(-1.570796 1.570796) clamped=true
      Coordinate neck_rotation: default_value=3.658914e-10 range=(-0.785398 0.785398) clamped=true
      PhysicalOffsetFrame torso_offset: socket_parent=/bodyset/torso translation=(0 0.4852375 0)
      PhysicalOffsetFrame head_offset: socket_parent=/bodyset/head translation=(0 0.6694995 0)
      SpatialTransform: axes_held_at_zero=(translation1 translation2 translation3)
        TransformAxis rotation1: coordinates=neck_flexion axis=(0 0 1) LinearFunction(coefficients=1 0)
        TransformAxis rotation2: coordinates=neck_bending axis=(1 0 0) LinearFunction(coefficients=1 0)
        TransformAxis rotation3: coordinates=neck_rotation axis=(0 1 0) LinearFunction(coefficients=1 0)
    CustomJoint acromial_r: socket_parent_frame=torso_offset socket_child_frame=humerus_r_offset
      Coordinate arm_flex_r: default_value=0 range=(-1.570796 1.570796) clamped=false
      Coordinate arm_add_r: default_value=-1.570796 range=(-2.094395 1.570796) clamped=false
      Coordinate arm_rot_r: default_value=0 range=(-1.570796 1.570796) clamped=false
      PhysicalOffsetFrame torso_offset: socket_parent=/bodyset/torso translation=(0.00282741 0.3329264 0.1523486)
      PhysicalOffsetFrame humerus_r_offset: socket_parent=/bodyset/humerus_r translation=(0 0 0)
      SpatialTransform: axes_held_at_zero=(translation1 translation2 translation3)
        TransformAxis rotation1: coordinates=arm_flex_r axis=(0 0 1) LinearFunction(coefficients=1 0)
        TransformAxis rotation2: coordinates=arm_add_r axis=(1 0 0) LinearFunction(coefficients=1 0)
        TransformAxis rotation3: coordinates=arm_rot_r axis=(0 1 0) LinearFunction(coefficients=1 0)
    PinJoint elbow_r: socket_parent_frame=humerus_r_offset socket_child_frame=ulna_r_offset
      Coordinate elbow_flex_r: default_value=7.691512e-5 range=(0 2.618) clamped=true
      PhysicalOffsetFrame humerus_r_offset: socket_parent=/bodyset/humerus_r
          translation=(0.01330767 -0.2898377 -0.009714478) orientation=(-0.0228627 0.228018 0.0051689)
      PhysicalOffsetFrame ulna_r_offset: socket_parent=/bodyset/ulna_r translation=(0 0 0)
          orientation=(-0.0228627 0.228018 0.0051689)
    PinJoint radioulnar_r: socket_parent_frame=ulna_r_offset socket_child_frame=radius_r_offset
      Coordinate pro_sup_r: default_value=1.570719 range=(0 1.570796) clamped=true
      PhysicalOffsetFrame ulna_r_offset: socket_parent=/bodyset/ulna_r
          translation=(-0.007385429 -0.01428011 0.02863597) orientation=(-1.56884 0.056428 1.53614)
      PhysicalOffsetFrame radius_r_offset: socket_parent=/bodyset/radius_r translation=(0 0 0)
          orientation=(-1.56884 0.056428 1.53614)
    UniversalJoint radius_hand_r: socket_parent_frame=radius_r_offset socket_child_frame=hand_r_offset
      Coordinate wrist_flex_r: default_value=0 range=(-1.22173 1.22173) clamped=true
      Coordinate wrist_dev_r: default_value=0 range=(-0.4363323 0.6108652) clamped=true
      PhysicalOffsetFrame radius_r_offset: socket_parent=/bodyset/radius_r
          translation=(-0.009658038 -0.2589248 0.01494213) orientation=(-1.5708 0 -1.5708)
      PhysicalOffsetFrame hand_r_offset: socket_parent=/bodyset/hand_r translation=(0 0 0)
          orientation=(-1.5708 0 -1.5708)
    CustomJoint acromial_l: socket_parent_frame=torso_offset socket_child_frame=humerus_l_offset
      Coordinate arm_flex_l: default_value=0 range=(-1.570796 1.570796) clamped=false
      Coordinate arm_add_l: default_value=-1.570796 range=(-2.094395 1.570796) clamped=false
      Coordinate arm_rot_l: default_value=0 range=(-1.570796 1.570796) clamped=false
      PhysicalOffsetFrame torso_offset: socket_parent=/bodyset/torso translation=(0.00282741 0.3329264 -0.1523486)
      PhysicalOffsetFrame humerus_l_offset: socket_parent=/bodyset/humerus_l translation=(0 0 0)
      SpatialTransform: axes_held_at_zero=(translation1 translation2 translation3)
        TransformAxis rotation1: coordinates=arm_flex_l axis=(0 0 1) LinearFunction(coefficients=1 0)
        TransformAxis rotation2: coordinates=arm_add_l axis=(-1 0 0) LinearFunction(coefficients=1 0)
        TransformAxis rotation3: coordinates=arm_rot_l axis=(0 -1 0) LinearFunction(coefficients=1 0)
    PinJoint elbow_l: socket_parent_frame=humerus_l_offset socket_child_frame=ulna_l_offset
      Coordinate elbow_flex_l: default_value=7.691512e-5 range=(0 2.618) clamped=true
      PhysicalOffsetFrame humerus_l_offset: socket_parent=/bodyset/humerus_l
          translation=(0.01330767 -0.2898377 0.009714478) orientation=(0.0228627 -0.228018 0.0051689)
      PhysicalOffsetFrame ulna_l_offset: socket_parent=/bodyset/ulna_l translation=(0 0 0)
          orientation=(0.0228627 -0.228018 0.0051689)
    PinJoint radioulnar_l: socket_parent_frame=ulna_l_offset socket_child_frame=radius_l_offset
      Coordinate pro_sup_l: default_value=1.570719 range=(0 1.570796) clamped=true
      PhysicalOffsetFrame ulna_l_offset: socket_parent=/bodyset/ulna_l
          translation=(-0.007385429 -0.01428011 -0.02863597) orientation=(1.56884 -0.056428 1.53614)
      PhysicalOffsetFrame radius_l_offset: socket_parent=/bodyset/radius_l translation=(0 0 0)
          orientation=(1.56884 -0.056428 1.53614)
    UniversalJoint radius_hand_l: socket_parent_frame=radius_l_offset socket_child_frame=hand_l_offset
      Coordinate wrist_flex_l: default_value=0 range=(-1.22173 1.22173) clamped=true
      Coordinate wrist_dev_l: default_value=0 range=(-0.4363323 0.6108652) clamped=true
      PhysicalOffsetFrame radius_l_offset: socket_parent=/bodyset/radius_l
          translation=(-0.009658038 -0.2589248 -0.01494213) orientation=(1.5708 0 1.5708)
      PhysicalOffsetFrame hand_l_offset: socket_parent=/bodyset/hand_l translation=(0 0 0)
          orientation=(1.5708 0 1.5708)
  ConstraintSet:
    CoordinateCouplerConstraint Abs_r3_con: independent_coordinate_names=L5_S1_Flex_Ext
        dependent_coordinate_name=Abs_r3 scale_factor=1
        coupled_coordinates_function=LinearFunction(coefficients=7.1429 0)
    CoordinateCouplerConstraint Abs_r1_con: independent_coordinate_names=L5_S1_axial_rotation
        dependent_coordinate_name=Abs_r1 scale_factor=1
        coupled_coordinates_function=LinearFunction(coefficients=5.5617 0)
    CoordinateCouplerConstraint Abs_r2_con: independent_coordinate_names=L5_S1_Lat_Bending
        dependent_coordinate_name=Abs_r2 scale_factor=1
        coupled_coordinates_function=LinearFunction(coefficients=11.3122 0)
    CoordinateCouplerConstraint L4_L5_Flex_Ext_con: independent_coordinate_names=L5_S1_Flex_Ext
        dependent_coordinate_name=L4_L5_Flex_Ext scale_factor=1
        coupled_coordinates_function=LinearFunction(coefficients=1.8571 0)
    CoordinateCouplerConstraint L4_L5_axial_rotation_con: independent_coordinate_names=L5_S1_axial_rotation
        dependent_coordinate_name=L4_L5_axial_rotation scale_factor=1
        coupled_coordinates_function=LinearFunction(coefficients=1.0625 0)
    CoordinateCouplerConstraint L4_L5_Lat_Bending_con: independent_coordinate_names=L5_S1_Lat_Bending
        dependent_coordinate_name=L4_L5_Lat_Bending scale_factor=1
        coupled_coordinates_function=LinearFunction(coefficients=1.33 0)
    CoordinateCouplerConstraint L3_L4_Flex_Ext_con: independent_coordinate_names=L5_S1_Flex_Ext
        dependent_coordinate_name=L3_L4_Flex_Ext scale_factor=1
        coupled_coordinates_function=LinearFunction(coefficients=1.6429 0)
    CoordinateCouplerConstraint L3_L4_axial_rotation_con: independent_coordinate_names=L5_S1_axial_rotation
        dependent_coordinate_name=L3_L4_axial_rotation scale_factor=1
        coupled_coordinates_function=LinearFunction(coefficients=1.0625 0)
    CoordinateCouplerConstraint L3_L4_Lat_Bending_con: independent_coordinate_names=L5_S1_Lat_Bending
        dependent_coordinate_name=L3_L4_Lat_Bending scale_factor=1
        coupled_coordinates_function=LinearFunction(coefficients=2.4314 0)
    CoordinateCouplerConstraint L2_L3_Flex_Ext_con: independent_coordinate_names=L5_S1_Flex_Ext
        dependent_coordinate_name=L2_L3_Flex_Ext scale_factor=1
        coupled_coordinates_function=LinearFunction(coefficients=1.1429 0)
    CoordinateCouplerConstraint L2_L3_axial_rotation_con: independent_coordinate_names=L5_S1_axial_rotation
        dependent_coordinate_name=L2_L3_axial_rotation scale_factor=1
        coupled_coordinates_function=LinearFunction(coefficients=0.875 0)
    CoordinateCouplerConstraint L2_L3_Lat_Bending_con: independent_coordinate_names=L5_S1_Lat_Bending
        dependent_coordinate_name=L2_L3_Lat_Bending scale_factor=1
        coupled_coordinates_function=LinearFunction(coefficients=2.4314 0)
    CoordinateCouplerConstraint L1_L2_Flex_Ext_con: independent_coordinate_names=L5_S1_Flex_Ext
        dependent_coordinate_name=L1_L2_Flex_Ext scale_factor=1
        coupled_coordinates_function=LinearFunction(coefficients=0.9286 0)
    CoordinateCouplerConstraint L1_L2_axial_rotation_con: independent_coordinate_names=L5_S1_axial_rotation
        dependent_coordinate_name=L1_L2_axial_rotation scale_factor=1
        coupled_coordinates_function=LinearFunction(coefficients=0.8125 0)
    CoordinateCouplerConstraint L1_L2_Lat_Bending_con: independent_coordinate_names=L5_S1_Lat_Bending
        dependent_coordinate_name=L1_L2_Lat_Bending scale_factor=1
        coupled_coordinates_function=LinearFunction(coefficients=2.0392 0)
    CoordinateCouplerConstraint L1_T12_axial_rotation: independent_coordinate_names=L5_S1_axial_rotation
        dependent_coordinate_name=L1_T12_axial_rotation scale_factor=1
        coupled_coordinates_function=LinearFunction(coefficients=0.75 0)
    CoordinateCouplerConstraint L1_T12_Flex_Ext_con: independent_coordinate_names=L5_S1_Flex_Ext
        dependent_coordinate_name=L1_T12_Flex_Ext scale_factor=1
        coupled_coordinates_function=LinearFunction(coefficients=0.5714 0)
    CoordinateCouplerConstraint L1_T12_Lat_Bending_con: independent_coordinate_names=L5_S1_Lat_Bending
        dependent_coordinate_name=L1_T12_Lat_Bending scale_factor=1
        coupled_coordinates_function=LinearFunction(coefficients=1.549 0)
    CoordinateCouplerConstraint patellofemoral_knee_angle_r_con: independent_coordinate_names=knee_angle_r
        dependent_coordinate_name=knee_angle_r_beta scale_factor=1
        coupled_coordinates_function=LinearFunction(coefficients=1 0)
    CoordinateCouplerConstraint patellofemoral_knee_angle_l_con: independent_coordinate_names=knee_angle_l
        dependent_coordinate_name=knee_angle_l_beta scale_factor=1
        coupled_coordinates_function=LinearFunction(coefficients=1 0)
  MarkerSet:
    Marker Nose: head (0.1330742 0.6712886 0.0001890391) fixed=true
    Marker Head: head (0.08100059 0.8258722 -0.0008006562) fixed=true
    Marker Neck: torso (-0.0007286437 0.4004947 0.0001656623) fixed=true
    Marker LShoulder: torso (-0.01142759 0.3282727 -0.1806444) fixed=true
    Marker RShoulder: torso (-0.01142759 0.3282727 0.1806444) fixed=true
    Marker LElbow: humerus_l (0.0253113 -0.3016647 0.008846455) fixed=true
    Marker RElbow: humerus_r (0.0253113 -0.3016647 -0.008846455) fixed=true
    Marker LWrist: radius_l (-0.0001905797 -0.2581068 -0.0106975) fixed=true
    Marker RWrist: radius_r (-0.0001905797 -0.2581068 0.0106975) fixed=true
    Marker Hip: pelvis (-0.05904166 -0.07512635 0)
    Marker LHip: pelvis (-0.0590417 -0.07512635 -0.09735057) fixed=true
    Marker RHip: pelvis (-0.0590417 -0.07512635 0.09735057) fixed=true
    Marker LKnee: femur_l (-0.006042266 -0.4312208 -0.005707473) fixed=true
    Marker RKnee: femur_r (-0.006042266 -0.4312208 0.005707473) fixed=true
    Marker LAnkle: tibia_l (-0.000284414 -0.3743446 -0.0148605) fixed=true
    Marker RAnkle: tibia_r (-0.000284414 -0.3743446 0.0148605) fixed=true
    Marker LBigToe: toes_l (0.06019309 0.009186921 0.0135721) fixed=true
    Marker LSmallToe: toes_l (0.02524167 0.008909813 -0.02679016) fixed=true
    Marker LHeel: calcn_l (0.01264662 0.02169298 0.00175626) fixed=true
    Marker RBigToe: toes_r (0.06019309 0.009186921 -0.0135721) fixed=true
    Marker RSmallToe: toes_r (0.02524167 0.008909813 0.02679016) fixed=true
    Marker RHeel: calcn_r (0.01264662 0.02169298 -0.00175626) fixed=true
